// COMSOL Multiphysics 5.6.0.401 model "fluid_flow.mph"
// Outline of the model tree

Parameters
  U = 1 [m/s]  // inlet fluid velocity
  W = 2.2 [m]  // width
  H = 0.41[m]  // hiegth
  R = 0.05[m]  // radius

Functions
  step1: Step | location = 0.5
  an1: Analytic | expr = 6*U*y*(H-y)/H^2; args = y

Geometry
  geom1 "Geometry 1" (2D, length unit m)
    r1: Rectangle | size = {W, H}
    c1: Circle | pos = {0.2, 0.2}; r = R
    dif1: Difference | input = r1; input2 = c1
    fin: Finalize "Form Union"

Materials
  mat1: Common "Material 1" on all domains
    def "Basic"
      density = 1
      dynamicviscosity = 1e-3

Physics
  spf: LaminarFlow on all domains
    dependent variable u = {u, v, w}
    fp1: FluidProperties (default)
    init1: init "Initial Values 1" (default)
    wallbc1: WallBC "Wall 1" (default)
    inl1: InletBoundary "Inlet 1" on boundaries 1 | U0in = 6*U*y*(H-y)/H^2*step1(t[1/s])
    out1: OutletBoundary "Outlet 1" on boundaries 4

Studies
  std1 "Study 1"
    time: Transient "Time Dependent" | tlist = range(0,0.2,3.4)