// COMSOL Multiphysics 5.6.0.401 model "Dynamic_analysis_plate.mph"
// Outline of the model tree

Parameters
  dt = 0.05[s]  // time step
  T = 5[s]  // total time

Functions
  an1: Analytic | expr = 10*sin(5*t); args = t; argunit = s; fununit = N

Probes
  pdom1: DomainPoint "Domain Point Probe 1"
    first = {1, 0.492742260468, 0.0265154088075}
    second = {0, 0.492742260468, 0.0265154088075}
    coords = {0.5, 0.5, 0.05}
    ppb1: PointExpr "Point Probe Expression 1" | expr = w; unit = mm; descr = Displacement field, Z component

Geometry
  geom1 "Geometry 1" (3D, length unit mm)
    blk1: Block | size = {1, 1, 0.05}
    fin: Finalize "Form Union"

Materials
  mat1: Common "Structural steel" on all domains
    def "Basic"
      relpermeability = 1
      heatcapacity = 475[J/(kg*K)]
      thermalconductivity = 44.5[W/(m*K)]
      electricconductivity = 4.032e6[S/m]
      relpermittivity = 1
      thermalexpansioncoefficient = 12.3e-6[1/K]
      density = 7850[kg/m^3]
    Enu "Young's modulus and Poisson's ratio"
      youngsmodulus = 200e9[Pa]
      poissonsratio = 0.30
    Murnaghan
      l = -3.0e11[Pa]
      m = -6.2e11[Pa]
      n = -7.2e11[Pa]
    Lame "Lamé parameters"
      lambLame = 1.15e11[Pa]
      muLame = 7.69e10[Pa]

Physics
  solid: SolidMechanics on all domains
    dependent variable u = {u, v, w}
    lemm1: LinearElasticModel "Linear Elastic Material 1" (default)
      dmp1: Damping on all domains | beta_dK = 0.05
    free1: Free (default)
    init1: init "Initial Values 1" (default)
    fix1: Fixed "Fixed Constraint 1" on boundaries 1, 2, 5, 6
    bndl1: BoundaryLoad on boundaries 4 | LoadType = TotalForce; Ftot = {0, 0, an1(t)}

Studies
  std1 "Study 1"
    time: Transient "Time Dependent" | tlist = range(0,dt,T)